solve block
    # guess values
    P000 := 0
    P010 := 0
    P011 := 0
    P001 := 0
    P111 := 0
    P1X1 := 0
    P11X := 0
    P0X1 := 0
    P01X := 0
    P1XX := 0
    P00X := 0
    P0X0 := 0
    L := 3
    u := 1.6
    v := 0.01
    y := 0.1
    # constraints
    P000*L == P010*u + P0X0*y + P00X*y + P001*u
    P010*(u + v + L) == P000*L + P011*u + P01X*y
    P011*(u + u + L + v + v) == P010*L + P001*L + P1X1*y + 2*P111*u + P11X*y
    P001*(u + L + v) == P011*u + P0X1*y
    P111*(2*u + v + v) == P011*L
    P1X1*(y + u + v) == P011*v + P111*v + P0X1*L
    P11X*(y + u) == P011*v + P111*v + P01X*L
    P0X1*(u + L + y + v) == P0X0*L + P010*v + P1XX*y + P1X1*u
    P01X*(u + y + L + v) == P1XX*y + P11X*u + P00X*L + P001*v
    P1XX*(y + y) == P0X1*v + P01X*v + P1X1*v
    P00X*(y + L) == P01X*u
    P0X0*(L + y) == P0X1*u
    P000 + P010 + P011 + P001 + P111 + P1X1 + P11X + P0X1 + P01X + P1XX + P00X + P0X0 == 1
    # solver
    Find(P000, P010, P011, P001, P111, P1X1, P11X, P0X1, P01X, P1XX, P00X, P0X0) = [0.140416; 0.176742; 0.244912; 0.0854023; 0.228179; 0.0351521; 0.0323181; 0.0184597; 0.0167366; 0.00351742; 0.00863826; 0.0095276]
end solve block
solve block
    # guess values
    P000 := 0.141
    P010 := 0.177
    P011 := 0.244
    P001 := 0.085
    P111 := 0.226
    P1X1 := 0.036
    P11X := 0.032
    P0X1 := 0.019
    P01X := 0.016
    P1XX := 0.006
    P00X := 0.008
    P0X0 := 0.009
    L := 1.5
    u := 0.8
    v := 0.01
    y := 0.1
    A := 0
    Q := 0
    Pотк := 0
    Pобасв := 0
    Aобазан := 0
    Pобазан := 0
    Aзансв := 0
    Pзансв := 0
    Aобарем := 0
    Pобарем := 0
    Aобаиспр := 0
    Pобаиспр := 0
    Aиспррем := 0
    Pиспррем := 0
    P1своб := P000 + P001 + P00X = 0.234
    P1зан := P010 + P011 + P111 + P11X + P01X = 0.695
    P1слом := P1X1 + P0X1 + P1XX + P0X0 = 0.07
    P2своб := P000 + P010 + P0X0 = 0.327
    P2зан := P011 + P001 + P111 + P1X1 + P0X1 = 0.61
    P2слом := P11X + P01X + P1XX + P00X = 0.062
    # constraints
    A == Q*L
    Q == 1 - Pотк
    Pотк == P1X1 + P1XX + P11X + P111 + (P1X1 + P111 + P11X)*0.1
    # solver
    Find(P1своб, P1зан, P1слом, P2своб, P2зан, P2слом) =  # error: Недопустимое ограничение. Используйте, например, оператор равно.
end solve block
